# OpenSim document version 40000
ScaleTool Right-scaled:
  mass: 4.77882 [kg]
  height: -1
  age: -1
  GenericModelMaker:
    model_file: C:\Users\r03mm22\Documents\Protocol_Testing\S2S_Calibration_2024\OMC Reference Kinematics\OMC_model_das3.osim
  ModelScaler:
    apply: true
    scaling_order: measurements
    marker_file: TRC_Position_Data\P001_CP_marker_pos.trc
    time_range: 30 30.01
    preserve_mass_distribution: false
    output_model_file: P001\das3_scaled_only.osim
    output_scale_file: P001\Scaling_Factors_OMC.xml
    MeasurementSet:
      Measurement Humerus: apply=true
        MarkerPair: markers=(AA EL)
        MarkerPair: markers=(AA EM)
        BodyScale humerus_1: axes=(X Y Z)
        BodyScale humerus_2: axes=(X Y Z)
        BodyScale humerus_r: axes=(X Y Z)
      Measurement Forearm: apply=true
        MarkerPair: markers=(EM RS)
        MarkerPair: markers=(EL US)
        BodyScale ulna_r: axes=(X Y Z)
        BodyScale radius_r: axes=(X Y Z)
        BodyScale hand_r: axes=(X Y Z)
      Measurement Thorax_Wdth: apply=true
        MarkerPair: markers=(C7 AA)
        MarkerPair: markers=(IJ AA)
        BodyScale thorax: axes=X
        BodyScale clavicle_1: axes=(X Y Z)
        BodyScale clavicle_2: axes=(X Y Z)
        BodyScale clavicle_r: axes=(X Y Z)
        BodyScale scapula_1: axes=(X Y Z)
        BodyScale scapula_2: axes=(X Y Z)
        BodyScale scapula_r: axes=(X Y Z)
      Measurement Thorax_Length: apply=true
        MarkerPair: markers=(C7 T8)
        MarkerPair: markers=(IJ PX)
        BodyScale thorax: axes=Y
      Measurement Thorax_Depth: apply=true
        MarkerPair: markers=(IJ C7)
        MarkerPair: markers=(PX T8)
        BodyScale thorax: axes=Z
  MarkerPlacer:
    apply: true
    marker_file: TRC_Position_Data\P001_CP_marker_pos.trc
    time_range: 30 30.01
    output_motion_file: P001\Static.mot
    output_model_file: P001\das3_scaled_and_placed.osim
    max_marker_movement: -1
    IKTaskSet:
      IKMarkerTask IJ: apply=true weight=1
      IKMarkerTask C7: apply=true weight=1
      IKMarkerTask T8: apply=true weight=1
      IKMarkerTask PX: apply=true weight=1
      IKMarkerTask SC: apply=false weight=1
      IKMarkerTask GH: apply=true weight=1
      IKMarkerTask AA: apply=true weight=1
      IKMarkerTask EL: apply=true weight=1
      IKMarkerTask EM: apply=true weight=1
      IKMarkerTask US: apply=true weight=1
      IKMarkerTask RS: apply=true weight=1
      IKCoordinateTask TH_x: apply=true weight=1 value_type=default_value value=0
      IKCoordinateTask TH_z: apply=true weight=1 value_type=default_value value=0
